// SBML level 2 version 1

model main()

  // Compartments:
  compartment cis_golgi = 1; cis_golgi is "cis-golgi";
  compartment media_golgi = 1; media_golgi is "media-golgi";

  // Species:
  species Glycan1; Glycan1 is "freeEnd--?b1D-GlcNAc,p--4b1D-GlcNAc,p--4b1D-Man,p(--3a1D-Man,p--2b1D-GlcNAc,p)--6a1D-Man,p(--3a1D-Man,p)--6a1D-Man,p";
  species Glycan2; Glycan2 is "freeEnd--?b1D-GlcNAc,p--4b1D-GlcNAc,p--4b1D-Man,p(--3a1D-Man,p--2b1D-GlcNAc,p)--6a1D-Man,p--3a1D-Man,p";
  species Glycan3; Glycan3 is "freeEnd--?b1D-GlcNAc,p--4b1D-GlcNAc,p--4b1D-Man,p(--3a1D-Man,p--2b1D-GlcNAc,p)--6a1D-Man,p";
  species Glycan4; Glycan4 is "freeEnd--?b1D-GlcNAc,p--4b1D-GlcNAc,p--4b1D-Man,p(--3a1D-Man,p--2b1D-GlcNAc,p)--6a1D-Man,p(--3a1D-Man,p)--6a1D-Man,p";
  species Glycan5; Glycan5 is "freeEnd--?b1D-GlcNAc,p--4b1D-GlcNAc,p--4b1D-Man,p(--3a1D-Man,p--2b1D-GlcNAc,p)--6a1D-Man,p--3a1D-Man,p";
  species Glycan6; Glycan6 is "freeEnd--?b1D-GlcNAc,p--4b1D-GlcNAc,p--4b1D-Man,p(--3a1D-Man,p--2b1D-GlcNAc,p)--6a1D-Man,p";

  // Reactions:
  GlycanRxn1: Glycan4 => Glycan5; Vm_Enz1_GlycanRxn1*Glycan4/(Glycan4 + Km_Enz1_GlycanRxn1(1 + Glycan1/Ki1_Glycan1 + Glycan2/GlycanRxn1_Ki2_Glycan2 + Glycan5/GlycanRxn1_Ki3_Glycan5)); GlycanRxn1 is "rxn1";
    Vm_Enz1_GlycanRxn1 = 300; Km_Enz1_GlycanRxn1 = 200; Ki1_Glycan1 = 200; GlycanRxn1_Ki2_Glycan2 = 100; GlycanRxn1_Ki3_Glycan5 = 100;
  GlycanRxn2: Glycan1 => Glycan2; Vm_Enz1_GlycanRxn2*Glycan1/(Glycan1 + Km_Enz1_GlycanRxn2(1 + Glycan4/GlycanRxn2_Ki1_Glycan4 + Glycan2/GlycanRxn2_Ki2_Glycan2 + Glycan5/GlycanRxn2_Ki3_Glycan5)); GlycanRxn2 is "rxn2";
    Vm_Enz1_GlycanRxn2 = 300; Km_Enz1_GlycanRxn2 = 200; GlycanRxn2_Ki1_Glycan4 = 200; GlycanRxn2_Ki2_Glycan2 = 100; GlycanRxn2_Ki3_Glycan5 = 100;
  GlycanRxn3: Glycan2 => Glycan3; Vm_Enz1_GlycanRxn3*Glycan2/(Glycan2 + Km_Enz1_GlycanRxn3(1 + Glycan4/GlycanRxn3_Ki1_Glycan4 + Glycan1/GlycanRxn3_Ki2_Glycan1 + Glycan5/GlycanRxn3_Ki3_Glycan5)); GlycanRxn3 is "rxn3";
    Vm_Enz1_GlycanRxn3 = 300; Km_Enz1_GlycanRxn3 = 100; GlycanRxn3_Ki1_Glycan4 = 200; GlycanRxn3_Ki2_Glycan1 = 200; GlycanRxn3_Ki3_Glycan5 = 100;
  GlycanRxn4: Glycan5 => Glycan6; Vm_Enz1_GlycanRxn4*Glycan5/(Glycan5 + Km_Enz1_GlycanRxn4(1 + Glycan4/GlycanRxn4_Ki1_Glycan4 + Glycan1/GlycanRxn4_Ki2_Glycan1 + Glycan2/Ki3_Glycan2)); GlycanRxn4 is "rxn4";
    Vm_Enz1_GlycanRxn4 = 300; Km_Enz1_GlycanRxn4 = 100; GlycanRxn4_Ki1_Glycan4 = 200; GlycanRxn4_Ki2_Glycan1 = 200; Ki3_Glycan2 = 100;
  glycantransport5: => Glycan1; qin_glycantransport5*Sin_Glycan1; glycantransport5 is "rxn5";
    qin_glycantransport5 = 10; Sin_Glycan1 = 0.8;
  glycantransport6: => Glycan2; qin_glycantransport6*Sin_Glycan2; glycantransport6 is "rxn6";
    qin_glycantransport6 = 10; Sin_Glycan2 = 0.1;
  glycantransport7: => Glycan3; qin_glycantransport7*Sin_Glycan3; glycantransport7 is "rxn7";
    qin_glycantransport7 = 10; Sin_Glycan3 = 0.1;
  glycantransport8: Glycan1 => Glycan4; kt_glycantransport8*Glycan1; glycantransport8 is "rxn8";
    kt_glycantransport8 = 2;
  glycantransport9: Glycan2 => Glycan5; kt_glycantransport9*Glycan2; glycantransport9 is "rxn9";
    kt_glycantransport9 = 2;
  glycantransport10: Glycan3 => Glycan6; kt_glycantransport10*Glycan3; glycantransport10 is "rxn10";
    kt_glycantransport10 = 2;
  glycantransport11: Glycan4 => ; kt_glycantransport11*Glycan4; glycantransport11 is "rxn11";
    kt_glycantransport11 = 2;
  glycantransport12: Glycan5 => ; kt_glycantransport12*Glycan5; glycantransport12 is "rxn12";
    kt_glycantransport12 = 2;
  glycantransport13: Glycan6 => ; kt_glycantransport13*Glycan6; glycantransport13 is "rxn13";
    kt_glycantransport13 = 2;
end
