// SBML level 2 version 1

model main()

  // Compartments:
  compartment baileyModel = 1;

  // Species:
  species Glycan1 in baileyModel; Glycan1 is "freeEnd--?b1D-GlcNAc,p--4b1D-GlcNAc,p--4b1D-Man,p(--3a1D-Man,p--2b1D-GlcNAc,p)--6a1D-Man,p(--3a1D-Man,p)--6a1D-Man,p";
  species Glycan2 in baileyModel; Glycan2 is "freeEnd--?b1D-GlcNAc,p--4b1D-GlcNAc,p--4b1D-Man,p(--3a1D-Man,p--2b1D-GlcNAc,p)--6a1D-Man,p--6a1D-Man,p";
  species Glycan3 in baileyModel; Glycan3 is "freeEnd--?b1D-GlcNAc,p--4b1D-GlcNAc,p--4b1D-Man,p(--3a1D-Man,p--2b1D-GlcNAc,p)--6a1D-Man,p";

  // Reactions:
  GlycanRxn1: Glycan1 => Glycan2; Vm_Enz1_GlycanRxn1*Glycan1/(Km_Enz1_GlycanRxn1*(1 + Glycan2/Ki_Enz1_GlycanRxn1) + Glycan1); GlycanRxn1 is "rxn1";
    Vm_Enz1_GlycanRxn1 = 300; Km_Enz1_GlycanRxn1 = 200; Ki_Enz1_GlycanRxn1 = 3076.9;
  GlycanRxn2: Glycan2 => Glycan3; Vm_Enz1_GlycanRxn2*Glycan2/(Km_Enz1_GlycanRxn2*(1 + Glycan1/Ki_Enz1_GlycanRxn2) + Glycan2); GlycanRxn2 is "rxn2";
    Vm_Enz1_GlycanRxn2 = 300; Km_Enz1_GlycanRxn2 = 3076.9; Ki_Enz1_GlycanRxn2 = 200;
end
