// SBML level 2 version 1

model main()

  // Compartments:
  compartment cis_golgi = 1;

  // Species:
  species m5 in cis_golgi = 0; m5 is "freeEnd--?b1D-GlcNAc,p--4b1D-GlcNAc,p--4b1D-Man,p(--3a1D-Man,p)--6a1D-Man,p(--3a1D-Man,p)--6a1D-Man,p";
  species m5gn in cis_golgi = 0; m5gn is "freeEnd--?b1D-GlcNAc,p--4b1D-GlcNAc,p--4b1D-Man,p(--3a1D-Man,p--2b1D-GlcNAc,p)--6a1D-Man,p(--3a1D-Man,p)--6a1D-Man,p";

  // Reactions:
  GlycanRxn1: m5 => m5gn; Vm_rxn1_ezn3*(udp_glcnac*m5 - m5gn*udp/Keq_rxn1_ezn3)/(Kmd_G1E_rxn1_ezn3*(Kmd_SNE_rxn1_ezn3 + udp_glcnac)*(1 + m5/Kmd_G1E_rxn1_ezn3)); GlycanRxn1 is "rxn1";
    Vm_rxn1_ezn3 = 1; Kmd_G1E_rxn1_ezn3 = 2; Kmd_SNE_rxn1_ezn3 = 3; Keq_rxn1_ezn3 = 4; udp_glcnac = 1; udp = 2;
end
