// SBML level 2 version 1

model main()

  // Compartments:
  compartment cis_golgi = 1;

  // Species:
  species m5 in cis_golgi = 0; m5 is "freeEnd--?b1D-GlcNAc,p--4b1D-GlcNAc,p--4b1D-Man,p(--3a1D-Man,p)--6a1D-Man,p(--3a1D-Man,p)--6a1D-Man,p";
  species m5gn in cis_golgi = 0; m5gn is "freeEnd--?b1D-GlcNAc,p--4b1D-GlcNAc,p--4b1D-Man,p(--3a1D-Man,p--2b1D-GlcNAc,p)--6a1D-Man,p(--3a1D-Man,p)--6a1D-Man,p";

  // Reactions:
  GlycanRxn1: m5 => m5gn; Vm_Enz1_GlycanRxn1*(UDP_GlcNAc*m5 - m5gn*UDP/Keq_Enz1_GlycanRxn1)/(Kmd_G1E_Enz1_GlycanRxn1*(Kmd_SNE_Enz1_GlycanRxn1 + UDP_GlcNAc)*(1 + m5/Kmd_G1E_Enz1_GlycanRxn1)); GlycanRxn1 is "rxn1";
    Vm_Enz1_GlycanRxn1 = 1; Kmd_G1E_Enz1_GlycanRxn1 = 2; Kmd_SNE_Enz1_GlycanRxn1 = 3; Keq_Enz1_GlycanRxn1 = 4; UDP_GlcNAc = 1; UDP = 2;
end
